# 《2kW 单相PFC 设计书》
# 宏定义：
# 定义单位：
V := 1
A := 1
W := 1
kW := 10^3
uH := 10^-6
uF := 10^-6
kHz := 10^3
mH := 10^-3
# 全局宏定义：
k := 10^3
m := 10^-3
u := 10^-6
n := 10^-9
p := 10^-12
# 定义运行硬件和相关参数：
# 定义PFC运行额定功率:
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P_out_max := 2*kW
# 定义母线额定电压值：
V_bus := 390*V
# 定义交流输入额定、最小、最大电压：
V_ac_nom := 220*V
V_ac_min := 110*V
V_ac_max := 265*V
# 定义交流输入额定、最小、最大频率值：
f_line_nom := 50 Hz
f_line_min := 47 Hz
f_line_max := 63 Hz
# 定义PFC设计目标效率：
Eff := 95 %
# 定义PFC功率因素值：
PF := 0.99
# 定义PFC功率频率：
f_Switch := 60*kHz
# PFC运行相关参数计算：
# 计算PFC输出电流额定值:
I_bus := P_out_max/V_bus = 5.12821 A
# 计算PFC输如功率值:
P_in := P_out_max/Eff = 2.10526 kW
# 计算AC电压最低与最高电压峰值:
V_ac_peak_min := sqrt(2)*V_ac_min = 155.563 V
V_ac_peak_max := sqrt(2)*V_ac_max = 374.767 V
# 当输入电压最小且输出满载功率时，输入电流最大
I_ac_max := P_out_max/(Eff*PF*V_ac_min) = 19.3321 A
# 计算输入电流最大值时的峰值与有效值
I_ac_max_peak := sqrt(2)*I_ac_max = 27.3397 A
I_ac_max_avg := 2*I_ac_max_peak/π = 17.405 A
# 保险丝选型计算：
# 输入保险丝选型原则为PFC工作最大电流平均值的1.5~2倍余量，取余量1.5倍,计算选型保险丝的额定电流值:
K_FUSE := 1.5
I_FUSE_Rating := K_FUSE*I_ac_max = 28.9981 A
# 即理想保险丝选30A，耐压大于265VAC的保险丝
# 整流桥选型计算：
# 输入电流交流电经流经整流桥整流，即流过整流桥最大的电流为输入AC的最大电流，取1.5倍余量，计算选型整流桥的额定电流值：
K_Bridge := 1.5
I_Bridge_Rating := K_Bridge*I_ac_max_avg = 26.1075 A
# 整流桥二极管截止时，其上的反向电压为BUS母线电压值，取1.3倍余量，计算选型整流桥耐压值
VK_Bridge := 1.3
V_Bridge_Rating := VK_Bridge*V_bus = 507 V
# 计算整流桥最大损耗值：
# 计算整流桥导通时的管压降V_F为1V
V_F_Bridge := 0.9*V
P_Bridge := 2*V_F_Bridge*I_ac_max_avg = 31.329 W
# 根据上述计算，整流桥选型的额定电流值需大于26A，且耐压值需大于507,其散热器能力必须满足31W的损耗散热。
# AC输入X电容计算：
# 通常情况输入电流纹波系数取0.2~0.5（代表电感电流纹波包络线）
K_I_Ripple := 0.5
# 通常情况输入电压纹波系数取0.05~0.08（代表输入电压纹波包络线）
K_VAC_Ripple := 0.08
# 计算输入电流纹波值：
Iac_Ripple := K_I_Ripple*I_ac_max_peak = 13.6698 A
# 计算输入电压纹波值：
Vac_Ripple := K_VAC_Ripple*V_ac_peak_min = 12.4451 V
# 计算输入X电容容量：
C_x := Iac_Ripple/(8*f_Switch*Vac_Ripple) = 2.28836 uF
# 计算所得X电容选取容量需大于2.2uF
# PFC电感选型，设计，损耗等计算：
# 根据boost工作原理，计算PFC正常运行时最大占空比为：
D_max := (V_bus - V_ac_peak_min)/V_bus = 60.1119 %
# 根据纹波电流大小，叠加最大工频纹波电流，得到电感的最大电流为：
I_L_max := I_ac_max_peak + Iac_Ripple/2 = 34.1746 A
# 当输入电压最小,占空比最大，此时计算出来的电感纹波电流最大，在此情况下计算最小电感量：
L_PFC := V_ac_peak_min/Iac_Ripple*1/f_Switch*D_max = 0.114013 mH
# 选取DMR95系列（该系列磁芯具有恒定磁导率，电感量随电流变化很小）磁磁芯用以电感设计，PQ5050磁芯
# 1.PQ5050磁芯相关参数如下：
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# 磁心Ae值：
AL_e := 363.8*u
# 磁心体积Ve值：
VL_e := 41291.3*n
# 磁心平均绕线长度：
lL_e := 113.5*m
# 磁心窗口面积：
WL_e := (44 - 21)/2*m*18*2*m = 414 u
# 2.PQ5050磁芯B、损耗、匝数计算：
# 定义谐振电感工作最恶劣最大Brmax为：
BL_max := 350*m
# 计算电感绕组匝数：
n_L := ceil(L_PFC*I_L_max/(BL_max*AL_e)) = 31
# 计算电感磁芯损耗（产家数据）：
P_LC := 7.629*10^-8*(BL_max*k)^2.52072*(f_Switch/k)^1.87872*k*VL_e = 17.859 W
# 3.PQ5050电感绕组与线损计算：
# 定义电感绕组工作最恶劣电流密度：
I_density_r := 8.5*k^2
# 电感采用0.1的多股励磁线绕制，计算励磁线股数：
NTs_L_r := ceil(I_ac_max_peak/(I_density_r*π*(0.1*m)^2/4)) = 410
# 采用0.1*400的多股励磁线绕制：
# 计算窗口占用率（控制在30%以下）：
λ_w1 := π*(0.1*m)^2/4*NTs_L_r*n_L/WL_e = 24.1121 %
# 计算电感绕组直流内阻（励磁线计算公式）：
R_dc_r := 22.5*m*120/NTs_L_r*(lL_e*n_L + 10*m) = 23.2365 m
# 定义绕组交流损耗系数：
AC_r := 1.5
# 计算变电感绕组最恶劣工况最大损耗：
P_LW := I_ac_max_peak^2*R_dc_r*AC_r = 26.0524 W
# 4.电感最恶劣工况总体损耗计算：
P_L := (P_LW + P_LC) = 43.9115 W
# 二极管选型计算：
# 定义二极管管压降（从datasheet上可得）
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V_DioF := 1.1*V
# 定义二极管反向恢复电荷（从datasheet上可得）
Q_RR := 0.8*u
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# 计算二极管导通损耗
P_Dio_con := V_DioF*I_bus = 5.64103 W
# 计算二极管反向恢复损耗
P_Dio_re := V_bus*Q_RR*f_Switch = 18.72 W
# 计算二极管总体损耗：
P_Dio := P_Dio_con + P_Dio_re = 24.361 W
# 流经二极管最大电流为余量（留1.5倍余量)：
I_Dio_max := 1.5*I_ac_max_peak = 41.0095 A
# 二极管截止电压为:（留1.5倍余量)：
V_dio_max := 1.5*V_bus = 585 V
# 即二极管选型的额定电流值需大于41A，耐压值需大于585V。
# 即二极管散热措施需能散掉最恶劣工况产生的Pdio损耗
# MOS选型计算：
# 定义MOS导通电阻（从datasheet上可得）
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R_MOS := 41*m
# MOS导通电流有效值可以近似等于
I_MOS_rms := P_out_max/V_ac_peak_min*sqrt(2 - (16*V_ac_peak_min/(3*π*V_bus))) = 14.7869 A
# 计算mos导通损耗
P_mos_con := I_MOS_rms^2*R_MOS = 8.96469 W
# 对于中大功率应用参和，驱动损耗占总损耗份额比较小，可以不计算
# 定义MOS驱动上升、下降时间，COSS容量，反向二极管QRR，实际运行电流为datasheet中电流的一半，取0.7即可：
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t_r := 28*n*70*% = 19.6 n
t_f := 8*n*70*% = 5.6 n
Q_rr := 1.9*u*70*% = 1.33 u
Coss := 400*p*70*% = 280 p
# 计算mos开关损耗：
P_mos_s := ((t_r + t_f)*V_bus*I_ac_max_peak + Coss*V_bus^2)/2*f_Switch + V_bus*Q_rr*f_Switch/2 = 24.8995 W
# 计算mos总损耗：
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P_mos := P_mos_con + P_mos_s = 33.8642 W
# 流经MOS最大电流为余量（留1.5倍余量)：
I_MOS_max := 1.5*I_ac_max_peak = 41.0095 A
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# MOS截止电压为:（留1.5倍余量)：
V_MOS_max := 1.5*V_bus = 585 V
# 即mos选型的额定电流值需大于41A，耐压值需大于585V。
# 即mos散热措施需能散掉最恶劣工况产生的Pmos损耗
# 输出电容容量计算
# 定义掉电保持最低电压值：
V_bus_hold := 200*V
# 定义掉电最小时间：
t_bus_hold := 20*m
# 计算最小电容量：
C_out := 2*P_out_max*t_bus_hold/(V_bus^2 - V_bus_hold^2) = 713.649 u
# 即BUS电容至少需要700uF以上
