# /***************************************************************************************
# * @file  LLC硬件设计报告与计算.xmcd
# * @author  尖叫的变压器
# * @version V1.0.0
# * @数字电源交流群  599937745
# * @淘宝店铺链接：
# https://shop239216898.taobao.com/?spm=2013.1.1000126.d21.5e571852VY9erz
# * @LegalDeclaration ：本文档内容难免存在Bug，
# 仅限于交流学习，禁止用于任何的商业用途
# * @Copyright  著作权归数字电源开源社区所有
# *****************************************************************************************/
# 1.LLC参数输入输出规格定义：
V_in_nom := 390 V
V_out_nom := 21 V
P_out := 105 W
# 2.谐振频率定义：
f_r := 90 kHz
f_rmin := 40 kHz
f_rmax := 150*kHz
# 3.计算变压器原副变比Nps：
V_D := 0.5 V
N_ps := V_in_nom/(V_out_nom + V_D) = 18.1395
# 4.计算谐振电感：
# 谐振电容选型，常用的10nF，22nF，33nF，47nF，一定要规避稀奇古怪的参数
C_r := 10 nF
L_r := 1/((2*π*f_r)^2*C_r) = 312.72 μH
# 谐变压器初级电感：励磁电感。
# 一般取谐振电感的3到7倍，励磁电感越大，励磁电流越小，ZVS越困难
# 经验值：
K := 5
L_m := K*L_r = 1563.6 μH
# 5.计算原边电流最大值与有效值（额定点）：
I_pri_rms := π/(2*sqrt(2))*P_out/V_out_nom/N_ps = 0.30616 A  # 次级电流按照匝数比折算到初级
I_pri_max := sqrt(2)*I_pri_rms = 0.432976 A
# 6.计算变压器激磁电流：
# 电感两端电压恒定时，电流线性变化，L*di/dt=U
I_m_rms := 2*sqrt(2)/π*N_ps*V_out_nom/(2*π*f_r*L_m) = 0.387876 A
# 8.变压器参数设计：
ur := 2000
μ_0 := 4*π*10^-7*H/m
u := ur*μ_0
lg := 0.2830450*mm
# Ur是初始磁导率
# U0是真空磁导率
# u是相对磁导率
# lg是磁芯中柱气息长度
# Ae是磁芯中柱面积
# le是磁芯闭合回路长度
# 磁芯选择PQ2625
# 谐振电感磁芯：PQ2020
Ae := 118.0*mm^2
le := 55.5*mm
N1 := sqrt(L_m*(lg + le/ur)/(Ae*μ_0)) = 57.2471
# 公式来源可以参考论文，
# 此处不再过多讲解，
N2 := N1/N_ps = 3.15593
# 计算最大磁通密度
Bmax := L_m*I_m_rms/(N1*Ae) = 0.0897806 T
